// SBML level 3 version 1

model Model_1()
  // New Model

  // Compartments:
  compartment compartment_0 = 1;

  // Species:
  species Ca in compartment_0 = 0.1; Ca is "Ca++";
  species calmodulin in compartment_0 = 0.1;
  species Ca_calmodulin in compartment_0 = 0.1; Ca_calmodulin is "Ca++-calmodulin";
  species CaMK_activated in compartment_0 = 0.1;
  species CaMK_inactive in compartment_0 = 0.1;
  species ATP in compartment_0 = 0.1;
  species CaMK_active in compartment_0 = 0.1;
  species ADP in compartment_0 = 0.1;
  species CaMK_partactive in compartment_0 = 0.1;
  species P in compartment_0 = 0.1;
  species Phosphatase in compartment_0 = 0.1;

  // Reactions:
  reaction_0: speciesReference_reaction0_species1 calmodulin + speciesReference_reaction0_species0 Ca => speciesReference_reaction0_species2 Ca_calmodulin; compartment_0*k1*calmodulin*Ca;
  reaction_1: speciesReference_reaction1_species4 CaMK_inactive + speciesReference_reaction1_species2 Ca_calmodulin => speciesReference_reaction1_species3 CaMK_activated; compartment_0*k1*CaMK_inactive*Ca_calmodulin;
  reaction_2: speciesReference_reaction2_species3 CaMK_activated + speciesReference_reaction2_species5 ATP => speciesReference_reaction2_species6 CaMK_active + speciesReference_reaction2_species7 ADP; compartment_0*k1*CaMK_activated*ATP;
  reaction_3: speciesReference_reaction3_species6 CaMK_active => speciesReference_reaction3_species0 Ca + speciesReference_reaction3_species8 CaMK_partactive + speciesReference_reaction3_species1 calmodulin; compartment_0*k1*CaMK_active;
  reaction_4: speciesReference_reaction4_species8 CaMK_partactive => speciesReference_reaction4_species9 P + speciesReference_reaction4_species4 CaMK_inactive; compartment_0*k1*CaMK_partactive;

  // Unit definitions:
  unit volume = 1 / (1e-3 litre)^nan;
  unit substance = 1 / (1e-3 mole)^nan;
end
